// COMSOL Multiphysics 6.2.0.339 model "CoaxialCylinder.mph"
// Outline of the model tree

Parameters
  inner_cylinder_R = 0.2[m]
  inner_offset_x = 0.1[m]
  outer_cylinder_R = 1.0[m]
  cylinder_thicknes = 0.2[m]
  x0 = -1.5[m]
  y0 = -1.5[m]
  W = 3[m]
  H = 3[m]
  OuterRingV = 0[V]
  InnerRingV = 100[V]

Geometry
  geom1 "EccentricCoaxial" (2D, length unit m)
    c1: Circle "InnerCylinder" | pos = {inner_offset_x, 0}; r = inner_cylinder_R
    c2: Circle "OuterCylinder" | r = outer_cylinder_R+cylinder_thicknes
    c3: Circle "GXe" | r = outer_cylinder_R
    r1: Rectangle | pos = {x0, y0}; size = {W, H}
    dif1: Difference | input = r1; input2 = c2
    dif2: Difference | input = c3; input2 = c1
    fin: Finalize "Form Union"

Materials
  mat1: Common "GXe" on domains 1
    def "Basic"
      relpermittivity = 1
  mat2: Common "LXe" on domains 2
    def "Basic"
      relpermittivity = 1.95

Physics
  es: Electrostatics on all domains
    dependent variable V
    ccn1: ChargeConservation (default)
    zc1: ZeroCharge (default)
    init1: init "Initial Values 1" (default)
    pot1: ElectricPotential "OuterRing" on boundaries 5-8, 11-14 | V0 = OuterRingV
    pot2: ElectricPotential on boundaries 9, 10, 15, 16 | V0 = InnerRingV
    sfcd1: SurfaceChargeDensity on boundaries 1-4

Mesh
  mesh1 "Mesh 1" (physics-controlled)
    size: MeshSizeDefault | hauto = 2

Studies
  std1 "Study 1"
    stat: Stationary

Solver configurations
  sol1 "Solution 1" (study std1)
    v1: Variables "Dependent Variables 1"
    s1: Stationary "Stationary Solver 1"
      dDef: Direct
      fc1: FullyCoupled

Datasets
  dset1: Solution | solution = sol1

Plots
  pg1: PlotGroup2D "Electric Potential (es)" | data = dset1
    surf1: Surface | expr = V
    str1: Streamline on boundaries 1-16 | expr = {es.Ex, es.Ey}; udist = 0.02
      col1: Color "Color Expression 1" | expr = V
      filt1: Filter | expr = !isScalingSystemDomain
  pg2: PlotGroup2D "Electric Field Norm (es)" | data = dset1
    surf1: Surface | expr = es.normE
    str1: Streamline on boundaries 1-16 | expr = {es.Ex, es.Ey}; udist = 0.02
      col1: Color "Color Expression 1" | expr = es.normE
      filt1: Filter | expr = !isScalingSystemDomain